VAX := READPRN("D:\Study\4_semestr\electronics\labs\1_lab\circuit1.DNO")
VAX[:, 0] = [
    0; 0.039996; 0.079992; 0.119988; 0.159984; 0.19998; 0.239976; 0.279972; 0.319968; 0.359964
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]
VAX[:, 1] = [
    0; 0; 0; 0; 0; 0; 0; 0; 0; 0
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]
VAX = [
    0, 0;
    0.039996, 0;
    0.079992, 0;
    0.119988, 0;
    0.159984, 0;
    0.19998, 0;
    0.239976, 0;
    0.279972, 0;
    0.319968, 0;
    0.359964, 0
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]
# [plot: VAX[:, 1] vs VAX[:, 0]]
# [plot: VAX[:, 1] vs VAX[:, 0]]
Ud1 := 0.809
Id1 := 0.385
Ud2 := 0.792
Id2 := 0*.202
Ud3 := 0.735
Id3 := 0.023
Ud4 := 0.714
Id4 := 0.011
Rb := (Ud1 - 2*Ud2 + Ud3)/Id1 = -0.103896
NFt := ((3*Ud2 - 2*Ud1) - Ud3)/ln(2) = 0.033182
Is0 := Id1*exp((Ud2 - 2*Ud1)/NFt) = 5.95055e-12
solve block
    # guess values
    Rb := 1
    Is0 := 0.0000001
    m := 2
    Ft := 0.02
    # constraints
    0.809 == 0.413*Rb + ln((Is0 + 0.413)/Is0)*m*Ft
    0.792 == 0.237*Rb + ln((Is0 + 0.237)/Is0)*m*Ft
    0.735 == 0.023*Rb + ln((Is0 + 0.023)/Is0)*m*Ft
    0.714 == 0.011*Rb + ln((Is0 + 0.023)/Is0)*m*Ft
    # solver
    Diod_P := Minerr(Is0, Rb, m, Ft)
end solve block
Rb := 1
Is0 := 0.0000001
m := 2
Ft := 0.02
Uk := Ik*Rb + ln((Is0 + Ik)/Is0)*m*Ft  # error: Эта переменная не определена. Проверьте правильность установки обозначения.
0.809 == 0.413*Rb + ln((Is0 + 0.413)/Is0)*m*Ft
0.792 == 0.237*Rb + ln((Is0 + 0.4237)/Is0)*m*Ft
0.735 == 0.023*Rb + ln((Is0 + 0.023)/Is0)*m*Ft
Diod_P = [0; 0.0282853; 1.60806; 0.0159738]
0.714 == 0.011*Rb + ln((Is0 + 0.023)/Is0)*m*Ft
Rb := 1
NFt := 0.0255
Is0 := 10^-14
Idiod := 0, 10^-5 .. 0.023
Udiod(Idiod) := Idiod*Rb + NFt*ln((Idiod + Is0)/Is0)
Idiod = [
    0; 1e-5; 2e-5; 3e-5; 4e-5; 5e-5; 6e-5; 7e-5; 8e-5; 9e-5
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]
# [plot: Idiod vs Udiod(Idiod)]
Rb1 := 1.2
NFt1 := 0.0255
Is01 := 22.7*10^6
Idiod := 0, 10^-5 .. 0.023
Uformula(Idiod) := Idiod*Rb1 + NFt1*ln((Idiod + Is01)/Is01)
VAX := READPRN("D:\Study\4_semestr\electronics\labs\1_lab\circuit1.DNO")
Idiod := VAX[:, 1]
VAX = [
    0, 0;
    0.039996, 0;
    0.079992, 0;
    0.119988, 0;
    0.159984, 0;
    0.19998, 0;
    0.239976, 0;
    0.279972, 0;
    0.319968, 0;
    0.359964, 0
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]
Idiod = [
    0; 0; 0; 0; 0; 0; 0; 0; 0; 0
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]
VAX[:, 0][45] = 0.815431
VAX[:, 1][45] = 0.492244
Iproverka := VAX[:, 1][45]
Uformula(Iproverka) = 0.590693
# [plot: VAX[:, 1], Uformula(Idiod) vs VAX[:, 0]]
