U1 == 0.550
I1 == 0.008
U2 == 0.608
I2 == 0.040
U3 == 0.658
I3 == 0.120
U4 == 0.698
I4 == 0.303
U5 == 0.755
I5 == 0.578
solve block
    # guess values
    Rb := 1
    Is0 := 0.0000001
    m := 2
    Ft := 0.02
    # constraints
    0.608 == 0.040*Rb + m*Ft*ln((0.040 - Is0)/Is0)
    0.658 == 0.120*Rb + m*Ft*ln((0.120 - Is0)/Is0)
    0.550 == 0.008*Rb + m*Ft*ln((0.008 - Is0)/Is0)
    0.698 == 0.303*Rb + m*Ft*ln((0.303 - Is0)/Is0)
    # solver
    Diod := Minerr(Is0, Rb, m, Ft)
end solve block
Diod = [3.33457e-9; 0.046723; 1.90244; 0.0196344]
