VFX := [0, 282781.420; -4, 384292.699; -8, 411767.974; -12, 426464.052; -16, 436048.45; -20, 442910.323]
# [plot: VFX[:, 1] vs VFX[:, 0]]
Lk := 10^-3
Ck := 10^-10
Cd := -(Ck*Lk - 1/(4*π^2*VFX[:, 1]^2))/Lk
# [plot: Cd vs VFX[:, 0]]
solve block
    # guess values
    M := 0.50
    VJ0 := 0.5
    CJ0 := 10^-12
    # constraints
    Cd[0] == CJ0*(1 - VFX[:, 0][0]/VJ0)^(-M)
    Cd[5] == CJ0*(1 - VFX[:, 0][5]/VJ0)^(-M)
    Cd[3] == CJ0*(1 - VFX[:, 0][3]/VJ0)^(-M)
    # solver
    minerr(CJ0, VJ0, M) = [2.16766e-10; 0.79909; 0.61587]
end solve block
solve block
    # guess values
    M := 0.50
    VJ0 := 0.5
    CJ0 := 10^-12
    # constraints
    Cd[0] == CJ0*(1 - VFX[:, 0][0]/VJ0)^(-M)
    Cd[5] == CJ0*(1 - VFX[:, 0][5]/VJ0)^(-M)
    Cd[3] == CJ0*(1 - VFX[:, 0][3]/VJ0)^(-M)
    find(CJ0, VJ0, M) = [2.16766e-10; 0.79909; 0.61587]
end solve block
