exp2 := READPRN("./exp2.export") = [
    0, 0;
    0.05, 3.18747e-9;
    0.1, 1.1073e-8;
    0.15, 3.06939e-8;
    0.2, 7.95566e-8;
    0.25, 2.01329e-7;
    0.3, 5.06856e-7;
    0.35, 1.29396e-6;
    0.4, 3.48265e-6;
    0.45, 1.06877e-5
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]
exp3 := READPRN("./exp3.export") = [
    0.615755, 0.00144486
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]
I_4 := exp2[:, 1][40, :] = [0.134572]
U_4 := exp2[:, 0][40, :] = [2]
I_3 := exp2[:, 1][30, :] = [0.0832211]
U_3 := exp2[:, 0][30, :] = [1.5]
I_2 := exp2[:, 1][20, :] = [0.0330925]
U_2 := exp2[:, 0][20, :] = [1]
I_1 := exp2[:, 1][1, :] = [3.18747e-9]
U_1 := exp2[:, 0][1, :] = [0.05]
# [plot: exp2[:, 1], exp3[:, 1] vs exp2[:, 0], exp3[:, 0]]
solve block
    # guess values
    R_b := 1
    I_s0 := 10^-10
    m := 2
    F_t := 0.02
    # constraints
    U_1 == I_1*R_b + ln((I_s0 + I_1)/I_s0)*m*F_t
    U_2 == I_2*R_b + ln((I_s0 + I_2)/I_s0)*m*F_t
    U_3 == I_3*R_b + ln((I_s0 + I_3)/I_s0)*m*F_t
    U_4 == I_4*R_b + ln((I_s0 + I_4)/I_s0)*m*F_t
    # solver
    Diod_P := Minerr(I_s0, R_b, m, F_t)
end solve block
Diod_P = [1.30894e-9; 9.29437; 0.648135; 0.0625717]
