Rk := 510
Ek := 5
Uinput := 5
Ik := 5/510 = 0.00980392
Bf := 81.895
Ukenas := 0.2
Ube := 0.9
Iknas := (Ek - Ukenas)/Rk = 0.00941176
Ibnas := Iknas/Bf = 0.000114925
S := 1
Rb := (Uinput - Ube)/(S*Ibnas) = 35675.5
S := 2
Rb := (Uinput - Ube)/(S*Ibnas) = 17837.8
S := 5
Rb := (Uinput - Ube)/(S*Ibnas) = 7135.1
S := 20
Rb := (Uinput - Ube)/(S*Ibnas) = 1783.78
